// COMSOL Multiphysics 5.5.0.292 model "ChargeDensityEstimation.mph"
// Outline of the model tree

Functions
  step1: Step | location = 3e-3; smooth = 2e-3
  gp1: GaussianPulse | location = 2e-3; sigma = 2e-4; normalization = peak
  an1: Analytic "stepLoad" | funcname = stepLoad; expr = -step1(x); argunit = s; fununit = N
  an2: Analytic "deltaLoad" | funcname = deltaLoad; expr = -gp1(x); argunit = s; fununit = N

Geometry
  geom1 "Geometry 1" (2D axisymmetric, length unit µm)
    r1: Rectangle | pos = {0, -75}; size = {300, 150}
    fin: Finalize "Form Union"

Materials
  mat1: Common "Polyvinylidene fluoride (PVDF)" on all domains
    def "Basic"
      relpermittivity = diag{7.4, 9.3, 7.6}
      density = 1780[kg/m^3]
    StrainCharge "Strain-charge form"
      sE = {3.781e-010[1/Pa], -1.482e-010[1/Pa], -1.724e-010[1/Pa], 0[1/Pa], 0[1/Pa], 0[1/Pa], -1.482e-010[1/Pa], 3.781e-10[1/Pa], -1.724e-010[1/Pa], 0[1/Pa], 0[1/Pa], 0[1/Pa], -1.724e-010[1/Pa], -1.724e-010[1/Pa], 1.092e-9[1/Pa], 0[1/Pa], 0[1/Pa], 0[1/Pa], 0[1/Pa], 0[1/Pa], 0[1/Pa], 1.428e-09[1/Pa], 0[1/Pa], 0[1/Pa], 0[1/Pa], 0[1/Pa], 0[1/Pa], 0[1/Pa], 1.11e-09[1/Pa], 0[1/Pa], 0[1/Pa], 0[1/Pa], 0[1/Pa], 0[1/Pa], 0[1/Pa], 1.11e-09[1/Pa]}
      dET = {0[C/N], 0[C/N], 1.358e-011[C/N], 0[C/N], 0[C/N], 1.476e-012[C/N], 0[C/N], 0[C/N], -3.38e-011[C/N], 0[C/N], 0[C/N], 0[C/N], 0[C/N], 0[C/N], 0[C/N], 0[C/N], 0[C/N], 0[C/N]}
      epsilonrT = diag{7.4, 9.3, 7.74}
      eta_sE = {0, 0, 0, 0, 0, 0, 0, 0, 0, 0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}
      eta_dET = {0, 0, 0, 0, 0, 0, 0, 0, 0, 0, 0, 0, 0, 0, 0, 0, 0, 0}
      eta_epsilonT = 0
    StressCharge "Stress-charge form"
      cE = {3.8e+09[Pa], 1.9e+09[Pa], 0.9e+09[Pa], 0[Pa], 0[Pa], 0[Pa], 1.9e+09[Pa], 3.8e+09[Pa], 0.9e+09[Pa], 0[Pa], 0[Pa], 0[Pa], 0.9e+09[Pa], 0.9e+09[Pa], 1.2e+09[Pa], 0[Pa], 0[Pa], 0[Pa], 0[Pa], 0[Pa], 0[Pa], 7e+08[Pa], 0[Pa], 0[Pa], 0[Pa], 0[Pa], 0[Pa], 0[Pa], 9e+08[Pa], 0[Pa], 0[Pa], 0[Pa], 0[Pa], 0[Pa], 0[Pa], 9e+08[Pa]}
      eES = {0[C/m^2], 0[C/m^2], 0.024[C/m^2], 0[C/m^2], 0[C/m^2], 0.001[C/m^2], 0[C/m^2], 0[C/m^2], -0.027[C/m^2], 0[C/m^2], 0[C/m^2], 0[C/m^2], 0[C/m^2], 0[C/m^2], 0[C/m^2], 0[C/m^2], 0[C/m^2], 0[C/m^2]}
      epsilonrS = diag{7.4, 9.3, 7.6}
      eta_cE = {0, 0, 0, 0, 0, 0, 0, 0, 0, 0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}
      eta_eES = {0, 0, 0, 0, 0, 0, 0, 0, 0, 0, 0, 0, 0, 0, 0, 0, 0, 0}
      eta_epsilonS = 0

Physics
  solid: SolidMechanics on all domains
    dependent variable u = {u, v, w}
    lemm1: LinearElasticModel "Linear Elastic Material 1" (default)
    axi1: AxialSymmetrySolid "Axial Symmetry 1" (default)
    free1: Free (default)
    init1: init "Initial Values 1" (default)
    pzm1: PiezoelectricMaterialModel "Piezoelectric Material 1" on all domains
    fix1: Fixed "Fixed Constraint 1" on boundaries 2
    bndl1: BoundaryLoad on boundaries 3
      LoadType = TotalForce
      Ftot = {0, 0, deltaLoad(t)}
      FperArea = {0, 0, -stepLoad(t)}
  es: Electrostatics on all domains
    dependent variable V
    ccn1: ChargeConservation (default)
    axi1: AxialSymmetry (default)
    zc1: ZeroCharge (default)
    init1: init "Initial Values 1" (default)
    ccnp1: ChargeConservationPiezo "Charge Conservation, Piezoelectric 1" on all domains
    gnd1: Ground on boundaries 2
    fp1: FloatingPotential on boundaries 3

Multiphysics
  pze1: PiezoelectricEffect on all domains | Solid_physics = solid; Electrostatics_physics = es

Mesh
  mesh1 "Mesh 1" (physics-controlled)
    size: MeshSizeDefault | hauto = 4

Studies
  std1 "Study 1"
    time: Transient "Time Dependent" | tlist = range(0, 1e-5, 0.34e-2)

Solver configurations
  sol1 "Solution 1" (study std1)
    v1: Variables "Dependent Variables 1"
      comp1_u: Field "Displacement field (comp1.u)" | scalemethod = manual; scaleval = 1e-2*0.00080777472107
    t1: Time "Time-Dependent Solver 1" | tlist = range(0, 1e-5, 0.34e-2); timemethod = genalpha
      dDef: Direct
      fc1: FullyCoupled | linsolver = dDef

Datasets
  dset1: Solution | solution = sol1
  rev1: Revolve2D "Revolution 2D 1" | data = dset1
  rev2: Revolve1D "Revolution 1D 2" | data = edg1
  edg1: Edge2D on boundaries 3 | data = dset1
  an1_ds1: Grid1D
  an2_ds1: Grid1D "Grid 1D 1a"

Derived values
  av1: AvLine "Av Potential" on boundaries 3
    data = edg1
    table = tbl1
    expr = V
    unit = V
    descr = Electric potential
    intsurface = on
  av2: AvLine "Av. charge density"
    data = edg1
    table = tbl2
    expr = es.nD
    unit = C/m^2
    descr = Surface charge density
    intsurface = on

Tables
  tbl1: Table
    // Av Potential
    Time (s) | Electric potential (V)
    0 | 1.14222e-21
    1e-05 | 4.75587e-20
    2e-05 | 1.39346e-19
    3e-05 | 2.19743e-19
    4e-05 | 2.98874e-19
    5e-05 | 5.70064e-19
    6e-05 | 1.03331e-18
    7e-05 | 1.49656e-18
    8e-05 | 1.95981e-18
    9e-05 | 2.42306e-18
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  tbl2: Table
    // Av. charge density
    Time (s) | Surface charge density (C/m^2)
    0 | -2.02367e-28
    1e-05 | -1.29938e-28
    2e-05 | 9.37461e-29
    3e-05 | 3.92078e-29
    4e-05 | -4.62442e-29
    5e-05 | -7.45008e-29
    6e-05 | -4.55621e-29
    7e-05 | -1.66234e-29
    8e-05 | 1.23153e-29
    9e-05 | 4.12539e-29
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
Plots
  pg1: PlotGroup2D "Stress (solid)" | data = dset1
    surf1: Surface | expr = solid.mises
      def: Deform "Deformation" | expr = {u, w}; descr = Displacement field
  pg2: PlotGroup3D "Stress, 3D (solid)" | data = rev1
    surf1: Surface | expr = solid.mises
      def: Deform "Deformation" | revcoordsys = cylindrical; expr = {u, 0, w}; descr = Displacement field
  pg3: PlotGroup2D "Boundary Loads (solid)" | data = dset1; typeintitle = off; descriptionintitle = off; unitintitle = off
    arwl1: ArrowLine "Boundary Load 1" | expr = {solid.bndl1.F_Ar, solid.bndl1.F_Az}
      col: Color "Color Expression" | expr = comp1.solid.bndl1.F_A_Mag
      def: Deform "Deformation" | expr = {u, w}; descr = Displacement field
    surf1: Surface "Gray Surfaces" (disabled) | expr = 1
      def: Deform "Deformation" | expr = {u, w}; descr = Displacement field
  pg4: PlotGroup2D "Electric Potential (es)" | data = dset1; dataisaxisym = on
    surf1: Surface | expr = V
  pg7: PlotGroup3D "Potential 3D" | data = rev1
    mslc1: Multislice | expr = V; descr = Electric potential
  pg10: PlotGroup2D "Charge Density" | data = rev2
    surf1: Surface | data = rev2; expr = es.nD; descr = Surface charge density
  pg11: PlotGroup1D "Av. Potential Plot" | data = dset1
    tblp1: Table "Table Graph 1" | table = tbl1
  pg12: PlotGroup1D "Av. charge Plot" | data = rev2
    tblp1: Table "Table Graph 1" | table = tbl2
  pg13: PlotGroup1D "Step Load Plot"
    data = an1_ds1
    title = Variation of applied force with time
    xlabel = Time (s)
    ylabel = Total Force (N)
    plot1: LineGraph | expr = stepLoad(x[1/m][s])
  pg14: PlotGroup1D "Delta Load Plot"
    data = an2_ds1
    title = Variation of applied force with time
    xlabel = Time (s)
    ylabel = Total Force (N)
    plot1: LineGraph | expr = deltaLoad(x[1/m][s])

Exports
  anim1: Animation "Stress"
    target = player
    giffilename = C:\Users\Prabha\Documents\comsol-project\2D AXI SYMMETRIC DATA\PVDF_150mic\stepFn\stresss.gif
    maxframes = 50
    size = current
  anim2: Animation "Potential"
    giffilename = C:\Users\Prabha\Documents\comsol-project\2D AXI SYMMETRIC DATA\PVDF_150mic\stepFn\potential.gif
    maxframes = 50
    size = current
  anim3: Animation "Charge Density"
    giffilename = C:\Users\Prabha\Documents\comsol-project\2D AXI SYMMETRIC DATA\PVDF_750mic\DeltaFn\chargee.gif
    maxframes = 50
  anim4: Animation "Applied Load"
    giffilename = C:\Users\Prabha\Documents\comsol-project\2D AXI SYMMETRIC DATA\stepLoadAnim.gif
    maxframes = 50