// COMSOL Multiphysics 5.5.0.292 model "CurrentMeasurement.mph"
// Outline of the model tree

Functions
  an1: Analytic "stepLoad" | funcname = stepLoad; expr = -step1(x); argunit = s; fununit = N
  an2: Analytic "deltaLoad" | funcname = deltaLoad; expr = -gp1(x); argunit = s; fununit = N
  gp1: GaussianPulse | location = 2e-3; sigma = 2e-4; normalization = peak
  step1: Step | location = 2e-3; smooth = 1e-3

Geometry
  geom1 "Geometry 1" (2D axisymmetric, length unit µm)
    r1: Rectangle | size = {300, 150}
    fin: Finalize "Form Union"

Materials
  mat1: Common "Polyvinylidene fluoride (PVDF)" on all domains
    def "Basic"
      relpermittivity = diag{7.4, 9.3, 7.6}
      density = 1780[kg/m^3]
    StrainCharge "Strain-charge form"
      sE = {3.781e-010[1/Pa], -1.482e-010[1/Pa], -1.724e-010[1/Pa], 0[1/Pa], 0[1/Pa], 0[1/Pa], -1.482e-010[1/Pa], 3.781e-10[1/Pa], -1.724e-010[1/Pa], 0[1/Pa], 0[1/Pa], 0[1/Pa], -1.724e-010[1/Pa], -1.724e-010[1/Pa], 1.092e-9[1/Pa], 0[1/Pa], 0[1/Pa], 0[1/Pa], 0[1/Pa], 0[1/Pa], 0[1/Pa], 1.428e-09[1/Pa], 0[1/Pa], 0[1/Pa], 0[1/Pa], 0[1/Pa], 0[1/Pa], 0[1/Pa], 1.11e-09[1/Pa], 0[1/Pa], 0[1/Pa], 0[1/Pa], 0[1/Pa], 0[1/Pa], 0[1/Pa], 1.11e-09[1/Pa]}
      dET = {0[C/N], 0[C/N], 1.358e-011[C/N], 0[C/N], 0[C/N], 1.476e-012[C/N], 0[C/N], 0[C/N], -3.38e-011[C/N], 0[C/N], 0[C/N], 0[C/N], 0[C/N], 0[C/N], 0[C/N], 0[C/N], 0[C/N], 0[C/N]}
      epsilonrT = diag{7.4, 9.3, 7.74}
      eta_sE = {0, 0, 0, 0, 0, 0, 0, 0, 0, 0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}
      eta_dET = {0, 0, 0, 0, 0, 0, 0, 0, 0, 0, 0, 0, 0, 0, 0, 0, 0, 0}
      eta_epsilonT = 0
    StressCharge "Stress-charge form"
      cE = {3.8e+09[Pa], 1.9e+09[Pa], 0.9e+09[Pa], 0[Pa], 0[Pa], 0[Pa], 1.9e+09[Pa], 3.8e+09[Pa], 0.9e+09[Pa], 0[Pa], 0[Pa], 0[Pa], 0.9e+09[Pa], 0.9e+09[Pa], 1.2e+09[Pa], 0[Pa], 0[Pa], 0[Pa], 0[Pa], 0[Pa], 0[Pa], 7e+08[Pa], 0[Pa], 0[Pa], 0[Pa], 0[Pa], 0[Pa], 0[Pa], 9e+08[Pa], 0[Pa], 0[Pa], 0[Pa], 0[Pa], 0[Pa], 0[Pa], 9e+08[Pa]}
      eES = {0[C/m^2], 0[C/m^2], 0.024[C/m^2], 0[C/m^2], 0[C/m^2], 0.001[C/m^2], 0[C/m^2], 0[C/m^2], -0.027[C/m^2], 0[C/m^2], 0[C/m^2], 0[C/m^2], 0[C/m^2], 0[C/m^2], 0[C/m^2], 0[C/m^2], 0[C/m^2], 0[C/m^2]}
      epsilonrS = diag{7.4, 9.3, 7.6}
      eta_cE = {0, 0, 0, 0, 0, 0, 0, 0, 0, 0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}
      eta_eES = {0, 0, 0, 0, 0, 0, 0, 0, 0, 0, 0, 0, 0, 0, 0, 0, 0, 0}
      eta_epsilonS = 0

Physics
  solid: SolidMechanics on all domains
    dependent variable u = {u, v, w}
    lemm1: LinearElasticModel "Linear Elastic Material 1" (default)
    axi1: AxialSymmetrySolid "Axial Symmetry 1" (default)
    free1: Free (default)
    init1: init "Initial Values 1" (default)
    pzm1: PiezoelectricMaterialModel "Piezoelectric Material 1" on all domains
    bndl1: BoundaryLoad on boundaries 3 | LoadType = TotalForce; Ftot = {0, 0, deltaLoad(t)}
    fix1: Fixed "Fixed Constraint 1" on boundaries 2
  es: Electrostatics on all domains
    dependent variable V
    ccn1: ChargeConservation (default)
    axi1: AxialSymmetry (default)
    zc1: ZeroCharge (default)
    init1: init "Initial Values 1" (default)
    ccnp1: ChargeConservationPiezo "Charge Conservation, Piezoelectric 1" on all domains
    gnd1: Ground on boundaries 2
    term1: Terminal on boundaries 3 | TerminalType = Circuit
  cir: Circuit "Electrical Circuit"
    dependent variable voltages
    gnd1: GroundNode
    R1: Resistor "Resistor R1" | R = 1e5[Ω]; Connections = {0, 1}
    termI1: ModelTerminalIV "External I-terminal 1" | V_src = root.comp1.es.V0_1; Connections = 1

Multiphysics
  pze1: PiezoelectricEffect on all domains | Solid_physics = solid; Electrostatics_physics = es

Mesh
  mesh1 "Mesh 1" (physics-controlled)

Studies
  std1 "Study 1"
    time: Transient "Time Dependent" | tlist = range(0, 1e-5, 0.5e-2)

Solver configurations
  sol1 "Solution 1" (study std1)
    v1: Variables "Dependent Variables 1"
      comp1_u: Field "Displacement field (comp1.u)" | scalemethod = manual; scaleval = 1e-2*0.000335410196625
    t1: Time "Time-Dependent Solver 1" | tlist = range(0, 1e-5, 0.5e-2)
      dDef: Direct
      fc1: FullyCoupled | linsolver = dDef

Datasets
  dset1: Solution | solution = sol1
  rev1: Revolve2D "Revolution 2D 1" | data = dset1; startangle = -90; revangle = 225
  rev2: Revolve2D "Revolution 2D 2" | data = dset1
  edg1: Edge2D on boundaries 3 | data = dset1
  rev3: Revolve1D "Revolution 1D 3" | data = edg1

Derived values
  av1: AvLine "Line Average 1" on boundaries 3
    data = dset1
    table = tbl1
    expr = V
    unit = V
    descr = Electric potential
    intsurface = on

Tables
  tbl1: Table
    // Line Average 1
    Time (s) | Electric potential (V)
    0 | 0
    1e-05 | 0
    2e-05 | 0
    3e-05 | 0
    4e-05 | 0
    5e-05 | 0
    6e-05 | 0
    7e-05 | 0
    8e-05 | 0
    9e-05 | 0
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
Plots
  pg1: PlotGroup2D "Stress (solid)" | data = dset1
    surf1: Surface | expr = solid.mises
      def: Deform "Deformation" | expr = {u, w}; descr = Displacement field
  pg2: PlotGroup3D "Stress, 3D (solid)" | data = rev1
    surf1: Surface | expr = solid.mises
      def: Deform "Deformation" | revcoordsys = cylindrical; expr = {u, 0, w}; descr = Displacement field
  pg3: PlotGroup2D "Boundary Loads (solid)" | data = dset1; typeintitle = off; descriptionintitle = off; unitintitle = off
    arwl1: ArrowLine "Boundary Load 1" | expr = {solid.bndl1.F_Ar, solid.bndl1.F_Az}
      col: Color "Color Expression" | expr = comp1.solid.bndl1.F_A_Mag
      def: Deform "Deformation" | expr = {u, w}; descr = Displacement field
    surf1: Surface "Gray Surfaces" (disabled) | expr = 1
      def: Deform "Deformation" | expr = {u, w}; descr = Displacement field
  pg4: PlotGroup2D "Electric Potential (es)" | data = dset1; dataisaxisym = on
    surf1: Surface | expr = V
  pg5: PlotGroup3D "Electric Potential, Revolved Geometry (es)" | data = rev1
    surf1: Surface | expr = V
  pg6: PlotGroup1D "Current through R" | data = dset1
    glob1: Global | expr = cir.R1_i; unit = A; descr = Current through device R1
  pg8: PlotGroup2D "Surface charge density" | data = rev3
    surf1: Surface | expr = es.nD; descr = Surface charge density

Exports
  anim1: Animation | target = player; maxframes = 50
  anim2: Animation | target = player